AAAZ
PR_ResolutionTtot
DEBPROC PR_ResolutionTtot M C K CL_A_0 CHA D_Imp alpha beta gamma dt Ttot U0 V0;

  U_t  = U0;
  V_t  = V0;
  W_t  = U0 * 0;

  U_sol = TABLE;
  V_sol = TABLE;
  W_sol = TABLE;

  U_sol.1 = U0;
  V_sol.1 = V0;

  NbCharg = DIMENSION CHA ;
  NbDImp  = DIMENSION D_Imp ;

  REPETER It_T En_Nb_Re;

    Si (NbCharg > 0) ;
        REPETER It2 NbCharg ;
            CHA_i = EXTR CHA CHAR &It2 ;
            CHP_i = EXTR CHA_i CHAM ;

            EVO_i = EXTR CHA_i EVOL ;
            CHA_ord = EXTR EVO_i ORDO;
            Val = EXTR CHA_ord &It_T;
            Si (&It_T neg 1);
              Val_t_m = EXTR CHA_ord (&It_T-1);
              Val = ((1+alpha)*Val) - (alpha*Val_t_m) ;
            FinSi ;

            Si (&It2 ega 1) ;
              FOR_Imp = CHP_i * Val ;
            SiNon ;
              FOR_Imp = FOR_Imp + (CHP_i * Val) ;
            FinSi ;
        FIN It2 ;
    SiNon ;
        FOR_Imp = U0 * 0;
    FinSi ;

    Si (NbDImp > 0) ;
        REPETER It2 NbDImp ;

            CHP_i    = D_Imp.&It2 .Dep ;
            CL_i     = D_Imp.&It2 .CL ;
            Evo_W_i  = D_Imp.&It2 .TabEvo.W ;

            lis_dep = EXTR Evo_W_i ORDO;
            Val_dep = EXTR lis_dep &It_T;

            Si ((&It2 ega 1) et (NbCharg EGA 0)) ;
              FOR_Imp = CHP_i * Val_dep ;
            SiNon ;
              FOR_Imp = FOR_Imp + (CHP_i * Val_dep) ;
            FinSi ;

            Si (&It2 ega 1) ;
              CL_A = CL_A_0 et (CL_i);
            SiNon ;
              CL_A = CL_A   et (CL_i);
            FinSi ;

        FIN It2 ;
    SiNon ;
        CL_A = CL_A_0;
    FinSi ;

    // Mess 'Instant ' &It_T ;

    W_t V_t U_t= PR_ResolutionInstantT M C K CL_A FOR_Imp alpha beta gamma dt U_t V_t W_t;

    Si (NbDImp > 0) ;   // Correction de l erreur d integration sur
                            // le depl impose par l acceleration

        REPETER It_0 NbDImp ;
            CL_i     = D_Imp.&It_0 .CL ;
            Evo_U_i  = D_Imp.&It_0 .TabEvo.U ;
            Evo_V_i  = D_Imp.&It_0 .TabEvo.V ;

            CHP_01 = MASQUE (EXCO (EXTR CL_i 'DIAG') 'LX' 'LX') 'EGALE' 0. ;
            CHP_02 = (CL_i * CHP_01)  ;
            CHP_03 = CHAN 'COMP' CHP_02 LFOR L_f ;
            Nor_f = (PR_NormVecEspace CHP_03) ;
            CHP_03 = CHP_03 / Nor_f ;
            Pro_U = (PR_ProdScalaireEspace CHP_03 U_t)  ;
            Pro_V = (PR_ProdScalaireEspace CHP_03 V_t)  ;

            lis_depU = EXTR Evo_U_i ORDO;
            Val_depU = (EXTR lis_depU &It_T) / Nor_f;
            lis_depV = EXTR Evo_V_i ORDO;
            Val_depV = (EXTR lis_depV &It_T) / Nor_f;

            U_t = (U_t + ((Val_depU - Pro_U) * CHP_03)) ;
            V_t = (V_t + ((Val_depV - Pro_V) * CHP_03)) ;

        Fin It_0 ;
    FinSi ;

    Si (&It_T > 1);
      U_sol.&It_T = U_t;
      V_sol.&It_T = V_t;
    FinSi ;
    W_sol.&It_T = W_t;

  FIN It_T;

  Solution = TABLE;

  Solution.U = U_sol;
  Solution.V = V_sol;
  Solution.W = W_sol;

  RESPRO Solution ;

FINPROC;
