AAXZ
PR_CalculErreurOutput
DEBPROC PR_CalculErreurOutput Coord/MOT Bool2/LOGIQUE Mode/ENTIER
            Ref_Cal/TABLE Sol_Cal/Table;

Bool1 = EXISTE Coord;
Si (EXISTE Bool2);
    Bool3=Bool2;
SiNon ;
    Bool3=(NON Bool1);
FinSi ;

    EneTot = PROG;

    Si (EXISTE Mode) ;
        rec_sol = PR_PGD_to_Full Mode;
        Err = PR_Difference_Solu Sol_Dir.u rec_sol.u;
    SiNon ;
        Err = PR_Difference_Solu Ref_Cal.u Sol_Cal.u;
    FinSi ;

    Out_Err = PR_CalculErreurDiff VRAI;

    Si Bool1;
        ErrDepl = Out_Err.MaxErr;
        ErrDepl = ErrDepl / Out_Err.SolAmpli;
        RESPRO ErrDepl;
    FinSi ;
    Si Bool3;
        EneTotEV = EVOL MANU T Vec_T Errr Out_Err.Tot ;
        ErrTotEV = EVOL MANU T Vec_T Errr Out_Err.3 ;
        ErrGlob = (EXTR (SOMM ErrTotEV) 1) / (EXTR (SOMM EneTotEV) 1) ;
        RESPRO ErrGlob;
    FinSi ;

FINPROC;
